// COMSOL Multiphysics 6.0.0.405 model "swirl flow around a rotating disk - without run.mph"
// Outline of the model tree

Parameters
  omega = 0.25*pi[rad/s]  // Angular velocity

Geometry
  geom1 "Geometry 1" (2D axisymmetric, length unit m)
    r1: Rectangle | size = {0.02, 0.04}
    r2: Rectangle | pos = {0, 0.014}; size = {0.008, 0.003}
    r3: Rectangle | pos = {0, 0.017}; size = {0.001, 0.023}
    dif1: Difference | input = r1; input2 = r2, r3
    fin: Finalize "Form Union"

Materials
  mat1: Common "Material 1"
    def "Basic"
      density = 1e3
      dynamicviscosity = 1e-3

Physics
  spf: LaminarFlow "Turbulent Flow, k-ε" on all domains
    dependent variable u = {u, v, w}
    ShapeProperty.order_fluid = 1
    PhysicalModelProperty.SwirlFlow = 1
    TurbulenceModelProperty.TurbulenceModelType = RANS
    fp1: FluidProperties (default) | rho_mat = userdef; rho = 1000[kg/m^3]; mu_mat = userdef; mu = 1e-3[Pa*s]
    init1: init "Initial Values 1" (default)
    axi1: AxialSymmetry (default)
    wallbc1: WallBC "Wall 1" (default)
    wallbc2: WallBC "Wall 2" on boundaries 3, 5, 7 | uvw = omega*r; SlidingWall = 1
    sym1: Symmetry on boundaries 6
    prpc1: PressurePointConstraint on points 8

Mesh
  mesh1 "Mesh 1" (physics-controlled)
    size: MeshSizeDefault | table = cfd; hauto = 4

Studies
  std1 "Study 1"
    stat: Stationary
      useparam = on
      pname = omega
      plistarr = range(pi*100,pi*200,pi*500)
      punit = rad/s
      pcontinuationmode = no
      preusesol = yes

Solver configurations
  sol1 "Solution 1" (study std1)
    v1: Variables "Dependent Variables 1"
    s1: Stationary "Stationary Solver 1"
      p1: Parametric
      se1: Segregated | maxsegiter = 300; segstabacc = segcflcmp; subinitcfl = 3
        ss1: SegregatedStep "Velocity u, Pressure p" | segvar = {comp1_u, comp1_p}; linsolver = d1; subdamp = 0.5
        ss2: SegregatedStep "Turbulence variables"
          segvar = {comp1_k, comp1_ep}
          linsolver = d2
          subdamp = 0.35
          subtermconst = itertol
          subiter = 3
          subntolfact = 1
        ll1: LowerLimit | lowerlimit = comp1.k 0 comp1.ep 0
      d1: Direct "Direct, fluid flow variables (spf)" | linsolver = pardiso; pivotperturb = 1.0E-13
      d2: Direct "Direct, turbulence variables (spf)" | linsolver = pardiso; pivotperturb = 1.0E-13
  sol2 "Laminar Swirl Flow" (study std1)

Datasets
  dset1: Solution | solution = sol1
  rev1: Revolve2D "Revolution 2D" | data = dset1; startangle = -90; revangle = 225
  dset2: Solution | solution = sol2
  cpl1: CutPlane | data = rev1; planetype = general; genpoints = {{0, 0, 0}, {0, 0, 1}, {cos(-90[deg]), sin(-90[deg]), 0}}
  cpl2: CutPlane | data = rev1; planetype = general; genpoints = {{0, 0, 0}, {0, 0, 1}, {cos(135[deg]), sin(135[deg]), 0}}

Plots
  pg1: PlotGroup2D "Velocity (spf)" | data = dset1; dataisaxisym = on
    surf1: Surface | expr = spf.U; unit = mm/s
    str1: Streamline | expr = {u, w}; udist = 0.04; pointtype = arrow; arrowcount = 100
  pg2: PlotGroup2D "Pressure (spf)" | data = dset1; dataisaxisym = on
    con1: Contour | expr = p; levelrounding = off
  pg3: PlotGroup3D "Velocity, 3D (spf)" | data = rev1
    surf1: Surface | expr = spf.U
    str1: StreamlineSurface
      data = cpl1
      revcoordsys = cylindrical
      expr = {u, v, w}
      linetype = tube
      tuberadiusscale = 1e-4
      pointtype = arrow
      arrowcount = 100
      arrowscale = 0.018
      col1: Color "Color Expression 1" | expr = spf.U
      filt1: Filter | expr = rev1y<0[m]
  pg4: PlotGroup2D "Azimuthal Velocity" | data = dset1
    surf1: Surface | expr = v; descr = Velocity field, phi component
    con1: Contour | expr = spf.U
  pg5: PlotGroup2D "Turbulent viscosity" | data = dset1; dataisaxisym = on
    surf1: Surface | expr = spf.muT; unit = Pa*s; descr = Turbulent dynamic viscosity
    str1: Streamline | expr = {u, w}; udist = 0.04; pointtype = arrow; arrowcount = 100